// COMSOL Multiphysics 5.3.1.229 model "Plasmonics_Final.mph"
// Outline of the model tree

Parameters
  period = 980[nm]  // Period
  h_substrate = 1000[nm]
  h_analyte = lambda
  n_substrate = 1.46
  n_analyte = 1.313
  n_dielectric = 2.5  // Refractive Index of Dielectric
  h_metal = 50[nm]  // Metal Thickness
  h_dielectric = 135[nm]  // f
  w_dielectric = D*period
  wp = 2*pi*2.1520[PHz]  // Properties of Gold
  gamma = 2*pi*1.6926[THz]  // Properties of Gold
  eps_inf = 6.9  // Properties of Gold
  lambda = 1550[nm]  // Frequency
  f1 = c_const/lambda
  D = 0.5102  // Duty Cycle

Geometry
  geom1 "Geometry 1" (2D, length unit nm)
    r1: Rectangle "Substrate" | size = {period, h_substrate}
    r2: Rectangle "Metal" | pos = {0, h_substrate}; size = {period, h_metal}
    r3: Rectangle "Dielectric"
      pos = {(period/2) - (w_dielectric/2), h_substrate+h_metal}
      size = {w_dielectric, h_dielectric}
    r4: Rectangle "Analyte Region" | pos = {0, h_substrate+h_metal}; size = {period, h_analyte}
    fin: Finalize "Form Union"

Physics
  emw: ElectromagneticWaves "Electromagnetic Waves, Frequency Domain" on all domains
    dependent variable E = {Ex, Ey, Ez}
    wee1: WaveEquationElectric (default)
    pec1: PerfectElectricConductor (default)
    init1: init "Initial Values 1" (default)
    wee2: WaveEquationElectric "Analyte" on domains 3
      DisplacementFieldModel = RefractiveIndex
      n_mat = userdef
      n = n_analyte
      ki_mat = userdef
      ki = 0
    wee3: WaveEquationElectric "Substrate" on domains 1
      DisplacementFieldModel = RefractiveIndex
      n_mat = userdef
      n = n_substrate
      ki_mat = userdef
      ki = 0
    wee4: WaveEquationElectric "Metal Layer" on domains 2
      DisplacementFieldModel = DielectricLoss
      epsilonBis_mat = userdef
      epsilonBis = imag(eps_inf-(wp^2/(2*pi*freq*(2*pi*freq+i*gamma))))
      epsilonPrim_mat = userdef
      epsilonPrim = real(eps_inf-(wp^2/(2*pi*freq*(2*pi*freq+i*gamma))))
      epsilonInf_mat = userdef
      epsilonInf = 1
      mur_mat = userdef
      mur = 1
      sigma_mat = userdef
      sigma = 0
    wee5: WaveEquationElectric "Dielectric" on domains 4
      DisplacementFieldModel = RefractiveIndex
      n_mat = userdef
      n = n_dielectric
      ki_mat = userdef
      ki = 0
    pc1: PeriodicCondition on boundaries 5, 15
      PeriodicType = Floquet
      Floquet_source = FromPeriodicPort
      constraintMethod = elemental
      destinationDomains: boundaries 15
    pc2: PeriodicCondition on boundaries 3, 14
      PeriodicType = Floquet
      Floquet_source = FromPeriodicPort
      constraintMethod = elemental
      destinationDomains: boundaries 14
    pc3: PeriodicCondition on boundaries 1, 13
      PeriodicType = Floquet
      Floquet_source = FromPeriodicPort
      constraintMethod = elemental
      destinationDomains: boundaries 13
    port1: Port on boundaries 7
      PortType = Periodic
      InputType = H
      H0 = {0, 0, 1}
      Hampl = {0, 0, 1}
      n = n_analyte
      IncludeInAutomaticDiffractionOrderCalculation = 0
    port2: Port on boundaries 2
      PortType = Periodic
      InputType = H
      H0 = {0, 0, 1}
      Hampl = {0, 0, 1}
      n = n_substrate
      IncludeInAutomaticDiffractionOrderCalculation = 0

Mesh
  mesh1 "Mesh 1"
    size: MeshSizeDefault | hauto = 1
    edg1: Edge on boundaries 1, 3, 5
    cpe1: CopyEdge | source = boundaries 5; destination = boundaries 15
    cpe2: CopyEdge | source = boundaries 3; destination = boundaries 14
    cpe3: CopyEdge | source = boundaries 1; destination = boundaries 13
    ftri1: FreeTri "Free Triangular 1" on remaining entities

Studies
  std1 "Study 1"
    freq: Frequency "Frequency Domain" | punit = THz; plist = range(175,50/250,225)